l_1 := 0.24
OA := l_1
r := 0.12
AB := r
R := 0.36
l_3 := 0.84
BC := l_3
q := 0, 0.1 .. 2*π
Y_B(q) := l_1*sin(q) + r*sin(2*q)
ϕ_1(q) := π - 2*q
X_B(q) := l_1*cos(q) - r*cos(2*q)
sinϕ_2(q) := (l_1*sin(q) + r*sin(2*q))/l_3
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ϕ_2(q) := asin((l_1*sin(q) + r*sin(2*q))/l_3)
difϕ_2(q) := (l_1*cos(q) + 2*r*cos(2*q))/l_3*1/sqrt(1 - sinϕ_2(q)^2)
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t
X_C(q) := l_1*cos(q) - r*cos(2*q) + l_3*cos(ϕ_2(q))
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difX_C(q) := -l_1*sin(q) + 2*r*sin(2*q) - l_3*sin(ϕ_2(q))*difϕ_2(q)
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q1 := 1
q_min := root(difX_C(q1), q1)
q_min = 1.0472
q1 := 3
q_max := root(difX_C(q1), q1)
q_max = 3.14159
H := |X_C(q_max) - X_C(q_min)|
H = 0.48
S(q) := X_C(q) - X_C(q_max)
P(q) :=
    800*sin(π*S(q)/H) if 0 ≤ S(q) ≤ H and difX_C(q) ≤ 0
    0 otherwise
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p := 20
20
g := 9.81
p_st := 7800
7800
m_1 := OA*p
m_1 = 4.8
m_2 := 0.1*r*r^2*π*p_st
m_2 = 4.23436
m_3 := BC*p
m_3 = 16.8
m_4 := 2*m_1
m_4 = 9.6
G_1 := m_1*g
G_1 = 47.088
G_2 := m_2*g
G_2 = 41.5391
G_3 := m_3*g
G_3 = 164.808
G_4 := m_4*g
G_4 = 94.176
x_S1 := 0
y_S1 := 0
x_S2(q) := OA*cos(q)
y_S2(q) := OA*sin(q)
x_A(q) := OA*cos(q)
y_A(q) := OA*sin(q)
x_S3(q) := (X_C(q) + X_B(q))/2
y_S3(q) := Y_B(q)/2
x_S4(q) := X_C(q)
y_S4 := 0
J_S1 := m_1*OA^2/12
J_S2 := m_2*r^2/2
J_S3 := m_3*BC^2/12
F_1x := 0
F_1y := 0
M_1 := 0
ω_1 := 15
ε_1 := 0
F_2x(q) := -m_2*ω_1^2*d^2/dq^2(x_S2(q))
F_2y(q) := -m_2*ω_1^2*d^2/dq^2(y_S2(q))
M_2(q) := 0
F_3x(q) := -m_3*ω_1^2*d^2/dq^2(x_S3(q))
F_3y(q) := -m_3*ω_1^2*d^2/dq^2(y_S3(q))
M_3(q) := -J_S3*ω_1^2*d^2/dq^2(ϕ_2(q))
F_4x(q) := -m_4*ω_1^2*d^2/dq^2(x_S4(q))
F_4y := 0
M_4(q) := 0
R_34x(q) := -P(q) - F_4x(q)
R_43x(q) := R_34x(q)
R_23x(q) := -F_3x(q) + R_34x(q)
R_23y(q) := (-M_3(q) + G_3*(X_C(q) - x_S3(q)) - F_3x(q)*y_S3(q) - F_3y(q)*(X_C(q) - x_S3(q)) - R_23x(q)*Y_B(q))/(X_C(q) - X_B(q))
R_43y(q) := R_23y(q) + F_3y(q) - G_3
R_32x(q) := R_23x(q)
f := tan(20 deg)
R_32y(q) := R_23y(q)
f = 0.36397
R_02t(q) := (R_32y(q)*(X_B(q) - x_A(q)) - R_32x(q)*(Y_B(q) - y_A(q)))/r
R_02n(q) := f*R_02t(q)
R_12x(q) := R_02n(q)*cos(q) + R_32x(q) - F_2x(q) + R_02t(q)*sin(q)
R_12y(q) := R_02n(q)*sin(q) + G_2 + R_32y(q) - R_02t(q)*cos(q) - F_2y(q)
R_21y(q) := R_12y(q)
R_21x(q) := R_12x(q)
Q(q) := R_21y(q)*x_A(q) - R_21x(q)*y_A(q)
Q_1(q) := -F_2x(q)*(d/dq(x_A(q))) - F_3x(q)*(d/dq(x_S3(q))) - (F_4x(q) + P(q))*d/dq(x_S4(q)) - (F_2y(q) - G_2)*d/dq(y_A(q)) - (F_3y(q) - G_3)*(d/dq(y_S3(q))) - M_3(q)*(d/dq(ϕ_2(q)))
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# Второй семестр.
# Третья часть курсового проекта.
# 1. Определение мощности требуемого двигателя
Пусть
n := 60
q := 0, 2*π/n .. 2*π - 2*π/n
N_t := ω_1*sqrt(sum(Q_1(q)^2, q)/n) = 7211.58
N_t = 7211.58
# Двигатель 2ПН160М:
N := 7500
ndn := 1500
I := 37
U := 220
R := 0.183
J_p := 0.083
L := 0.005
# 2. Составление уравнений Лагранжа
# 2.1. Определение приведенного момента инерции
J_pm := 10*J_S1
ω_d := ndn*2*π/60 = 157.08
i := ω_d/ω_1
Y(q) := J_p*i^2 + J_pm + J_S1 + m_2*((d/dq(x_S2(q)))^2 + (d/dq(y_S2(q)))^2) + J_S3*difϕ_2(q)^2 + m_3*((d/dq(x_S3(q)))^2 + (d/dq(y_S3(q)))^2) + m_4*(d/dq(x_S4(q)))^2
Y_0 := sum(Y(q), q)/n = 11.2498
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# 2.2. Определение приведенного момента сопротивления
Q_c(q) := P(q)*(d/dq(X_C(q))) - G_2*d/dq(y_A(q)) - G_3*d/dq(y_S3(q))
Q_c0 := sum(Q_c(q), q)/n = -38.9135
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# 3. Составление уравнения статической характеристики двигателя
ω_xx := ω_d*U/(U - R*I) = 162.068
M_dn := N/ω_d = 47.7465
S_d := M_dn/(ω_xx - ω_d) = 9.57227
M_d := -S_d*ω_d + S_d*ω_xx = 47.7465
dq := 0, 0.001 .. ω_xx/i
τ := L/R = 0.0273224  # Электромеханическая постоянная
# 4. Нахождение нулевого приближения Q0 и ω0
Q_0 := -Q_c0 = 38.9135
S := S_d*i^2
ω_0 := (i*S_d*ω_xx - Q_0)/S = 15.4392
# 5. Разложение в ряд возмущающий момент L(q)
L(q) := -1/2*d/dq(Y(q))*ω_0^2 + Q_c(q) - Q_c0
k := 1 .. 5
Lc[k] := 2/n*sum(L(q)*cos(k*q), q)
Ls[k] := 2/n*sum(L(q)*sin(k*q), q)
L_d(q) := sum(Lc[k]*cos(k*q) + Ls[k]*sin(k*q), k)
La[k] := sqrt(Lc[k]^2 + Ls[k]^2)
α[k] := angle(Lc[k], Ls[k])
f(q) := sum(La[k]*cos(k*q - α[k]), k)
Q_s(dq) := i*S_d*ω_xx - S*dq
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# 6. Определение динамической ошибки по скорости ψ'(t), движущего момента Qdt, Q0+μ(t), момента на выходе передаточного механизма Mп(t)
S_d := (M_dn/(ω_xx - ω_d))
s := S_d*i^2 = 1049.72
p := 1i*ω_0
τ_m := Y_0/s = 0.010717
D_1(p) := s*(τ_m*τ*p^2 + τ_m*p + 1)
W_1(p) := (τ*p + 1)/D_1(p)
T := 2*π/ω_0 = 0.406962
t := 0, T/100 .. T
j := sqrt(-1)
ψ'(t) := sum(La[k]*|W_1(j*ω_0*k)|*cos(k*ω_0*t - α[k] + arg(W_1(j*ω_0*k))), k)
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W_2(p) := -s/D_1(p)
μ(t) := sum(La[k]*|W_2(j*ω_0*k)|*cos(k*ω_0*t - α[k] + arg(W_2(j*ω_0*k))), k)
Q_d(t) := Q_0 + μ(t)
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# Были найдены точки, в которых функция динамической ошибки по скорости принимает максимальное и минимальное значения
q1 := 0.3
qmax := Maximize(ψ', q1) = 0.297506
ψ'max := ψ'(qmax) = 2.48596
q2 := 0.2
qmin := Minimize(ψ', q2) = 0.24046
ψ'min := ψ'(qmin) = -2.50181
δ := (ψ'max - ψ'min)/ω_0*100 = 32.3058  # Коэффициент неравномерности вращения вала
J_d := J_p*i^2 + J_pm
τ_d := J_d/s = 0.00889037
J_mm := 0  # Без маховика
τ_m := (Y_0 + J_mm)/s
W3(p) := (τ_d*τ*p^2 + τ_d*p + 1)/(τ_m*τ*p^2 + τ_m*p + 1)
Mп(t) := Q_c0 + sum(La[k]*|W3(j*k*ω_0)|*cos(k*ω_0*t - α[k] + arg(W3(j*ω_0*k))), k)
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t_p := 0.1
t_max := Minimize(Mп, t_p) = 0.121614
Mпmax := |Mп(t_max)| = 894.937
# 7. Оценивание динамических характеристик машины
# δ < 10%, Mn < 0
# 7.1. Установка маховика на вале машины. Mп < 0
J_d := J_p*i^2 + J_pm = 9.33237
τ_d := J_d/s = 0.00889037
J_dm := 0
J_mm := 305  # При моменте маховика 305 Мр меньше нуля
τ_m := (Y_0 + J_mm)/s = 0.301272
τ_d := (J_d + J_dm)/s = 0.00889037
W_3(p) := (τ_d*τ*p^2 + τ_d*p + 1)/(τ_m*τ*p^2 + τ_m*p + 1)
M_p(t) := sum(La[k]*|W_3(1i*ω_0*k)|*cos(k*ω_0*t - α[k] + arg(W_3(1i*ω_0*k))), k) + Q_c0
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D1(p) := s*(τ_m*τ*p^2 + τ_m*p + 1)
W1(p) := (τ*p + 1)/D1(p)
j := sqrt(-1)
ψ'(t) := sum(La[k]*|W1(j*k*ω_0)|*cos(k*ω_0*t - α[k] + arg(W1(j*ω_0*k))), k)
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# 7.2. Установка маховика на вале машины. δ < 10%
ro := 7800
R := nthroot(J_mm/(0.1*π*ro), 5) = 0.659191
t1 := 0.3
t2 := 0.1
t_max := Maximize(ψ', t1) = 0.339113
t_min := Minimize(ψ', t2) = 0.148683
ψ'_max := ψ'(t_max) = 0.0566232
ψ'_min := ψ'(t_min) = -0.0863756
δ := (ψ'_max - ψ'_min)/ω_0*100 = 0.926203
# 7.3. Установка маховика на вале двигателя. δ < 10%
J_mm := 0
J_md := 0.2
Y_0 = 11.2498  # Нужно подобрать Jmd
# Оно на что-то влияет?
τd := (J_d + J_md*i^2)/s = 0.0297841
τm := (Y_0 + J_md*i^2)/s = 0.0316107
# [component: outputs Result]
D1(p) := s*(τm*τ*p^2 + τm*p + 1)
W1(p) := (τ*p + 1)/D1(p)
j := sqrt(-1)
ψ'(t) := sum(La[k]*|W1(j*k*ω_0)|*cos(k*ω_0*t - α[k] + arg(W1(j*ω_0*k))), k)
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# Были найдены точки, в которых функция принимает максимальное и минимальное значения
q1 := 0.3
qmax := Maximize(ψ', q1) = 0.322274
ψ'max := ψ'(qmax) = 0.73573
q2 := 0.1
qmin := Minimize(ψ', q2) = 0.138938
ψ'min := ψ'(qmin) = -0.812593
δ := (ψ'max - ψ'min)/ω_0*100 = 10.0285
ρ := 7800
Rmd := nthroot(J_md/(0.1*π*ρ), 5) = 0.15218
W2(p) := -s/D1(p)
μ(t) := sum(La[k]*|W2(j*k*ω_0)|*cos(k*ω_0*t - α[k] + arg(W2(j*ω_0*k))), k)
Qd(t) := Q_0 + μ(t)
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W3(p) := (τd*τ*p^2 + τd*p + 1)/(τm*τ*p^2 + τm*p + 1)
s = 1049.72
Mп(t) := Q_c0 + sum(La[k]*|W3(j*k*ω_0)|*cos(k*ω_0*t - α[k] + arg(W3(j*ω_0*k))), k)
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# Если увеличивать Jmd, Mп пойдет в разнос
# 7.4. Подобор коэффициента усиления K0. Построение графиков
J_mm := 0
J_md := 0
τd := (J_d + J_md*i^2)/s = 0.00889037
τm := (Y_0 + J_md*i^2 + J_mm*i^2)/s = 0.010717
K0 := 2.9
Wос := -K0
r := s*ω_xx/220 = 773.296
D1(p) := s*(τm*τ*p^2 + τm*p + 1)
W4(p) := (τ*p + 1)/(D1(p) + K0*r)
W1(p) := (τ*p + 1)/D1(p)
ψ'(t) := sum(La[k]*|W1(j*k*ω_0)|*cos(k*ω_0*t - α[k] + arg(W1(j*ω_0*k))), k)
ψ'1(t) := sum(La[k]*|W4(j*k*ω_0)|*cos(k*ω_0*t - α[k] + arg(W4(j*ω_0*k))), k)
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q1 := 0.17
qmax := Maximize(ψ'1, q1) = 0.167339
ψ'1max := ψ'1(qmax) = 0.700299
q2 := 0.2
qmin := Minimize(ψ'1, q2) = 0.219369
ψ'1min := ψ'1(qmin) = -0.759579
δ := (ψ'1max - ψ'1min)/ω_0*100 = 9.45563
W5(p) := (-s - Y_0*p*r*Wос*W4(p))/D1(p)
W_2(p) := -s/D_1(p)
μ(t) := sum(La[k]*|W_2(j*ω_0*k)|*cos(k*ω_0*t - α[k] + arg(W_2(j*ω_0*k))), k)
μ1(t) := sum(La[k]*|W5(j*k*ω_0)|*cos(k*ω_0*t - α[k] + arg(W5(j*ω_0*k))), k)
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W3(p) := (τd*τ*p^2 + τd*p + 1)/(τm*τ*p^2 + τm*p + 1)
Mп1(t) := Q_c0 - μ1(t) + J_d*(d/dt(ψ'1(t)))
Mп(t) := Q_c0 + sum(La[k]*|W3(j*k*ω_0)|*cos(k*ω_0*t - α[k] + arg(W3(j*ω_0*k))), k)
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# 7.5. Построение АЧХ и ФЧХ для замкнутой системы
W4(p) := (τ*p + 1)/(D1(p) + K0*r)
ω0 := 0, 0.01 .. 150
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# 7.6. Построение логарифмической частотной характеристики, для разомкнутой системы
W_p(p) := r*K0/D_1(p)
LM(ω) := 20*log(|W_p(j*ω)|)
ω := 0.1, 0.2 .. 1000
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φ(ω) := arg(W_p(j*ω))
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