q1 := 0, 0.1 .. 2*π
l1 := 0.2
a := 0.5
Radius := 0.2
a1(q1) := acos(l1*cos(q1)/sqrt(l1^2 + 2*l1*sin(q1)*a + a^2)) - π/2
xc(q1) := ((asin(l1/a) + acos(l1*cos(q1)/sqrt(l1^2 + 2*l1*sin(q1)*a + a^2))) + (-π/2))*Radius
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a1(2*π - asin(l1/a)) = -23.5782 deg
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asin(l1/a) = 23.5782 deg
dxc(q1) := d/dq1(xc(q1))
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