q1 := 1
l1 := 0.9
l2 := 1
q2 := 1
l3 := 1.1
a := 0.2
q3 := 1
b := 0.1
H01' := [1, 0, 0, 0; 0, 1, 0, 0; 0, 0, 1, 0; 0, 0, 0, 1]
H1'1 := [cos(q1), -sin(q1), 0, 0; sin(q1), cos(q1), 0, 0; 0, 0, 1, 0; 0, 0, 0, 1]
H01 := H01'*H1'1
H12' := [0, 0, 1, 0; 1, 0, 0, 0; 0, 1, 0, l1; 0, 0, 0, 1]
H2'2 := [cos(q2), -sin(q2), 0, 0; sin(q2), cos(q2), 0, 0; 0, 0, 1, 0; 0, 0, 0, 1]
H12 := H12'*H2'2
H23' := [1, 0, 0, 0; 0, 1, 0, l2; 0, 0, 1, 0; 0, 0, 0, 1]
H3'3 := [cos(q3), -sin(q3), 0, 0; sin(q3), cos(q3), 0, 0; 0, 0, 1, 0; 0, 0, 0, 1]
RM3 := [l3; 0; 0; 1]
H23 := H23'*H3'3
H23*RM3 → [1.1*cos(1); 1.1*sin(1) + 1; 0; 1]
RM0 := H01*H12*H23*RM3
RM0 simplify → [1.09326645548; -0.701978318316; 2.44052947538; 1]
XM := RM0[0]
YM := RM0[1]
RM0 = [1.09327; -0.701978; 2.44053; 1]
ZM := RM0[2]
q31 := asin((XM^2 + YM^2 + (ZM - l1)^2 - l3^2 - l2^2)/(2*l2*l3))
q31 = 1
cosq3 := sqrt(1 - sin(q3)^2)
sq21 := ((ZM - l1)*l3*cosq3 - (l3*sin(q31) + l2)*sqrt(XM^2 + YM^2))/(l3^2 + 2*l2*l3*sin(q31) + l2^2)
sq22 := ((ZM - l1)*l3*cosq3 + (l3*sin(q31) + l2)*sqrt(XM^2 + YM^2))/(l3^2 + 2*l2*l3*sin(q31) + l2^2)
cq21 := (sqrt(XM^2 + YM^2) + (l3*sin(q31) + l2)*sq21)/(l3*cosq3)
cq22 := (-sqrt(XM^2 + YM^2) + (l3*sin(q31) + l2)*sq22)/(l3*cosq3)
q21 := atan2(cq21, sq21)
q22 := atan2(cq22, sq22)
q22 = 1
q21 = -0.401262
sq11 := XM/(-(l3*cos(q21)*cosq3 - l3*sin(q21)*sin(q31) - l2*sin(q21)))
sq12 := XM/(-(l3*cos(q22)*cosq3 - l3*sin(q22)*sin(q31) - l2*sin(q22)))
cq11 := YM/(l3*cos(q21)*cosq3 - l3*sin(q21)*sin(q31) - l2*sin(q21))
cq12 := YM/(l3*cos(q22)*cosq3 - l3*sin(q22)*sin(q31) - l2*sin(q22))
q11 := atan2(cq11, sq11)
q12 := atan2(cq12, sq12)
q11 = -2.14159
q12 = 1
t3 := 1.5  # Это будет время дохождения до точки В, в которой начинаем рисовать
V := 0.6
xstart := 0.282843
lin1 := 0.6
ystart := 1.034315
R2 := 0.20
R3 := 0.25
tp := lin1/V + 7*π*R2/(4*V) + 3*π*R3/(2*V)  # время рисования
t := t3, t3 + 0.05 .. t3 + tp
α2(t) := 5*π/4 - V/R2*(t - t3 - lin1/V)
α3(t) := π/2 + V/R3*(t - t3 - lin1/V - 7*π*R2/(4*V))
xp(t) :=
    cos(3*π/4)*0.6*(t - t3) if 0 ≤ t < lin1/V + t3
    cos(α2(t))*R2 - xstart if lin1/V + t3 ≤ t < (t3 + lin1/V + 7*π*R2/(4*V))
    cos(α3(t))*R3 - xstart if (t3 + lin1/V + 7*π*R2/(4*V)) ≤ t ≤ t3 + tp
yp(t) :=
    sin(3*π/4)*0.6*(t - t3) if 0 ≤ t < t3 + lin1/V
    1.6 - ystart + sin(α2(t))*R2 if t3 + lin1/V ≤ t < (t3 + lin1/V + 7*π*R2/(4*V))
    1.15 - ystart + sin(α3(t))*R3 if t3 + lin1/V + 7*π*R2/(4*V) ≤ t ≤ t3 + tp
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H0st := [1, 0, 0, xstart; 0, 1, 0, ystart; 0, 0, 1, 0; 0, 0, 0, 1]  # матрица перехода из системы стола
Rmst(t) := [xp(t); yp(t); 0; 1]
Rmq0(t) := H0st*Rmst(t)  # описание траектории в нулевой системе
x(t) := Rmq0(t)[0]
y(t) := Rmq0(t)[1]
z(t) := Rmq0(t)[2]
x(3.5) = 0.120049
y(3.5) = 1.75996
z(3.5) = 0
as(t) := (x(t)^2 + y(t)^2 + (z(t) - l1)^2 - l3^2 - l2^2)/(2*l2*l3)
q31bc(t) := asin((x(t)^2 + y(t)^2 + (z(t) - l1)^2 - l3^2 - l2^2)/(2*l2*l3))
as(3.5) = 0.778129
sq21bc(t) := ((z(t) - l1)*l3*cos(q31bc(t)) - (l3*sin(q31bc(t)) + l2)*sqrt(x(t)^2 + y(t)^2))/(l3^2 + 2*l2*l3*sin(q31bc(t)) + l2^2)
cq21bc(t) := (sqrt(x(t)^2 + y(t)^2) + (l3*sin(q31bc(t)) + l2)*sq21bc(t))/(l3*cos(q31bc(t)))
q21bc(t) := atan2(cq21bc(t), sq21bc(t))
sq11bc(t) := x(t)/(-(l3*cos(q21bc(t))*cos(q31bc(t)) - l3*sin(q21bc(t))*sin(q31bc(t)) - l2*sin(q21bc(t))))
cq11bc(t) := y(t)/(l3*cos(q21bc(t))*cos(q31bc(t)) - l3*sin(q21bc(t))*sin(q31bc(t)) - l2*sin(q21bc(t)))
q11bc(t) := atan2(cq11bc(t), sq11bc(t))
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dq31bc(t) := d/dt(q31bc(t))
dq21bc(t) := d/dt(q21bc(t))
dq11bc(t) := d/dt(q11bc(t))
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Rmst(t) := [x(t); y(t); 0]  # траектория винта в нулевой СК
t4 := t3 + tp
F := CreateSpace(Rmst, t3, t4, 2000)
# [component: inputs F]
