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H01' := [1, 0, 0, 0; 0, 1, 0, 0; 0, 0, 1, 0; 0, 0, 0, 1]
H1'1 := [cos(q1), -sin(q1), 0, 0; sin(q1), cos(q1), 0, 0; 0, 0, 1, 0; 0, 0, 0, 1]
H01 := H01'*H1'1
H12' := [0, 0, 1, 0; 1, 0, 0, 0; 0, 1, 0, l1; 0, 0, 0, 1]
H2'2 := [cos(q2), -sin(q2), 0, 0; sin(q2), cos(q2), 0, 0; 0, 0, 1, 0; 0, 0, 0, 1]
H12 := H12'*H2'2
H23' := [1, 0, 0, 0; 0, 1, 0, l2; 0, 0, 1, 0; 0, 0, 0, 1]
H3'3 := [cos(q3), -sin(q3), 0, 0; sin(q3), cos(q3), 0, 0; 0, 0, 1, 0; 0, 0, 0, 1]
RM3 := [l3; 0; 0; 1]
H23 := H23'*H3'3
RM0 := H01*H12*H23*RM3
RM0 simplify → [
    -sin(q1)*(l3*cos(q2 + q3) - l2*sin(q2));
    cos(q1)*(l3*cos(q2 + q3) - l2*sin(q2));
    l1 + l3*sin(q2 + q3) + l2*cos(q2);
    1
]
l1 := 0.9
l2 := 1
l3 := 1.1
a := 0.2
b := 0.1
t3 := 2  # Это будет время дохождения до точки В, в которой начинаем рисовать
V := 0.6
xstart := 0.282843
lin1 := 0.6
ystart := 1.034315
R2 := 0.20
R3 := 0.25
tp := lin1/V + 7*π*R2/(4*V) + 3*π*R3/(2*V)  # время рисования
t := t3, t3 + 0.05 .. t3 + tp
α2(t) := 5*π/4 - V/R2*(t - t3 - lin1/V)
α3(t) := π/2 + V/R3*(t - t3 - lin1/V - 7*π*R2/(4*V))
xp(t) :=
    cos(3*π/4)*0.6*(t - t3) if 0 ≤ t ≤ lin1/V + t3
    cos(α2(t))*R2 - xstart if lin1/V + t3 ≤ t < (t3 + lin1/V + 7*π*R2/(4*V))
    cos(α3(t))*R3 - xstart if (t3 + lin1/V + 7*π*R2/(4*V)) ≤ t ≤ t3 + tp
yp(t) :=
    sin(3*π/4)*0.6*(t - t3) if 0 ≤ t ≤ t3 + lin1/V
    1.6 - ystart + sin(α2(t))*R2 if t3 + lin1/V ≤ t < (t3 + lin1/V + 7*π*R2/(4*V))
    1.15 - ystart + sin(α3(t))*R3 if (t3 + lin1/V + 7*π*R2/(4*V)) ≤ t ≤ t3 + tp
H0st := [1, 0, 0, xstart; 0, 1, 0, ystart; 0, 0, 1, 0; 0, 0, 0, 1]  # матрица перехода из системы стола
Rmst(t) := [xp(t); yp(t); 0; 1]
Rmq0(t) := H0st*Rmst(t)  # описание траектории в нулевой системе
x(t) := Rmq0(t)[0]
y(t) := Rmq0(t)[1]
z(t) := Rmq0(t)[2]
q31bc(t) := asin((x(t)^2 + y(t)^2 + (z(t) - l1)^2 - l3^2 - l2^2)/(2*l2*l3))
sq21bc(t) := ((z(t) - l1)*l3*cos(q31bc(t)) - (l3*sin(q31bc(t)) + l2)*sqrt(x(t)^2 + y(t)^2))/(l3^2 + 2*l2*l3*sin(q31bc(t)) + l2^2)
cq21bc(t) := (sqrt(x(t)^2 + y(t)^2) + (l3*sin(q31bc(t)) + l2)*sq21bc(t))/(l3*cos(q31bc(t)))
q21bc(t) := atan2(cq21bc(t), sq21bc(t))
sq11bc(t) := x(t)/(-(l3*cos(q21bc(t))*cos(q31bc(t)) - l3*sin(q21bc(t))*sin(q31bc(t)) - l2*sin(q21bc(t))))
cq11bc(t) := y(t)/(l3*cos(q21bc(t))*cos(q31bc(t)) - l3*sin(q21bc(t))*sin(q31bc(t)) - l2*sin(q21bc(t)))
q11bc(t) := atan2(cq11bc(t), sq11bc(t))
dq31bc(t) := d/dt(q31bc(t))
dq21bc(t) := d/dt(q21bc(t))
dq11bc(t) := d/dt(q11bc(t))
ddq31bc(t) := d^2/dt^2(q31bc(t))
ddq21bc(t) := d^2/dt^2(q21bc(t))
ddq11bc(t) := d^2/dt^2(q11bc(t))
Rmst(t) := [x(t); y(t); 0]  # траектория винта в нулевой СК
t4 := t3 + tp
F := CreateSpace(Rmst, t3, t4, 2000)
t1 := 0.5  # до этого времени тормозим по cos
t2 := 1.4  # до этого времени едем с постоянной скоростью
t3 = 2  # до этого времени тормозим
Φ(t) :=
    1 if t ≥ 0
    0 otherwise  # самодельная функция Хэвисайда
t := 0, 0.01 .. t3
ap := 0.8  # disabled
at := 0.5  # disabled
qsab''(t) :=
    ap*cos(t*π/(2*t1)) if 0 ≤ t < t1
    0 if t1 ≤ t < t2
    at if t2 ≤ t
qsab'(t) :=
    2*t1*ap*sin(t*π/(2*t1))/π if 0 ≤ t < t1
    2*t1*ap*sin(π/2)/π if t1 ≤ t < t2
    2*t1*ap*sin(π/2)/π + at*(t - t2) if t2 ≤ t
qsab(t) :=
    4*t1^2*ap*cos(0)/π^2 - 4*t1^2*ap*cos(t*π/(2*t1))/π^2 if 0 ≤ t < t1
    4*t1^2*ap*cos(0)/π^2 + 2*t1*ap*sin(π/2)/π*(t - t1) if t1 ≤ t < t2
    4*t1^2*ap*cos(0)/π^2 + 2*t1*ap*sin(π/2)/π*(t2 - t1) + 2*t1*ap*sin(π/2)/π*(t - t2) + at*(t - t2)^2/2 if t2 ≤ t
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qsab(t3) simplify → 0.578786012918*ap + 0.18*at
qsab'(t3) simplify → 0.318309886184*ap + 0.6*at
ap1 := det([q11bc(t3), 0.18; dq11bc(t3 + 0.0100), 0.6])/det([0.578786012918, 0.18; 0.318309886184, 0.6]) = -0.852338
at1 := det([0.578786012918, q11bc(t3); 0.318309886184, dq11bc(t3 + 0.0001)])/det([0.578786012918, 0.18; 0.318309886184, 0.6]) = 1.26304
ap2 := det([q21bc(t3), 0.18; dq21bc(t3 + 0.0001), 0.6])/det([0.578786012918, 0.18; 0.318309886184, 0.6]) = -2.82615
at2 := det([0.578786012918, q21bc(t3); 0.318309886184, dq21bc(t3 + 0.0001)])/det([0.578786012918, 0.18; 0.318309886184, 0.6]) = 1.45771
ap3 := det([q31bc(t3), 0.18; dq31bc(t3 + 0.0001), 0.6])/det([0.578786012918, 0.18; 0.318309886184, 0.6]) = -0.41693
at3 := det([0.578786012918, q31bc(t3); 0.318309886184, dq31bc(t3 + 0.0001)])/det([0.578786012918, 0.18; 0.318309886184, 0.6]) = 0.70746
q2ab''(t) :=
    ap2*cos(t*π/(2*t1)) if 0 ≤ t < t1
    0 if t1 ≤ t < t2
    at2 if t2 ≤ t
q1ab''(t) :=
    ap1*cos(t*π/(2*t1)) if 0 ≤ t < t1
    0 if t1 ≤ t < t2
    at1 if t2 ≤ t
q2ab'(t) :=
    2*t1*ap2*sin(t*π/(2*t1))/π if 0 ≤ t < t1
    2*t1*ap2*sin(π/2)/π if t1 ≤ t < t2
    2*t1*ap2*sin(π/2)/π + at2*(t - t2) if t2 ≤ t
q1ab'(t) :=
    2*t1*ap1*sin(t*π/(2*t1))/π if 0 ≤ t < t1
    2*t1*ap1*sin(π/2)/π if t1 ≤ t < t2
    2*t1*ap1*sin(π/2)/π + at1*(t - t2) if t2 ≤ t
q2ab(t) :=
    4*t1^2*ap2*cos(0)/π^2 - 4*t1^2*ap2*cos(t*π/(2*t1))/π^2 if 0 ≤ t < t1
    4*t1^2*ap2*cos(0)/π^2 + 2*t1*ap2*sin(π/2)/π*(t - t1) if t1 ≤ t < t2
    4*t1^2*ap2*cos(0)/π^2 + 2*t1*ap2*sin(π/2)/π*(t2 - t1) + 2*t1*ap2*sin(π/2)/π*(t - t2) + at2*(t - t2)^2/2 if t2 ≤ t
q1ab(t) :=
    4*t1^2*ap1*cos(0)/π^2 - 4*t1^2*ap1*cos(t*π/(2*t1))/π^2 if 0 ≤ t < t1
    4*t1^2*ap1*cos(0)/π^2 + 2*t1*ap1*sin(π/2)/π*(t - t1) if t1 ≤ t < t2
    4*t1^2*ap1*cos(0)/π^2 + 2*t1*ap1*sin(π/2)/π*(t2 - t1) + 2*t1*ap1*sin(π/2)/π*(t - t2) + at1*(t - t2)^2/2 if t2 ≤ t
q3ab''(t) :=
    ap3*cos(t*π/(2*t1)) if 0 ≤ t < t1
    0 if t1 ≤ t < t2
    at3 if t2 ≤ t
q3ab'(t) :=
    2*t1*ap3*sin(t*π/(2*t1))/π if 0 ≤ t < t1
    2*t1*ap3*sin(π/2)/π if t1 ≤ t < t2
    2*t1*ap3*sin(π/2)/π + at3*(t - t2) if t2 ≤ t
q3ab(t) :=
    4*t1^2*ap3*cos(0)/π^2 - 4*t1^2*ap3*cos(t*π/(2*t1))/π^2 if 0 ≤ t < t1
    4*t1^2*ap3*cos(0)/π^2 + 2*t1*ap3*sin(π/2)/π*(t - t1) if t1 ≤ t < t2
    4*t1^2*ap3*cos(0)/π^2 + 2*t1*ap3*sin(π/2)/π*(t2 - t1) + 2*t1*ap3*sin(π/2)/π*(t - t2) + at3*(t - t2)^2/2 if t2 ≤ t
q1(t) :=
    q1ab(t) if 0 ≤ t ≤ t3
    q11bc(t) if t3 ≤ t ≤ t4
q2(t) :=
    q2ab(t) if 0 ≤ t ≤ t3
    q21bc(t) if t3 ≤ t ≤ t4
q3(t) :=
    q3ab(t) if 0 ≤ t ≤ t3
    q31bc(t) if t3 ≤ t ≤ t4
dq1(t) :=
    q1ab'(t) if 0 ≤ t ≤ t3
    dq11bc(t) if t3 ≤ t ≤ t4
dq2(t) :=
    q2ab'(t) if 0 ≤ t ≤ t3
    dq21bc(t) if t3 ≤ t ≤ t4
dq3(t) :=
    q3ab'(t) if 0 ≤ t ≤ t3
    dq31bc(t) if t3 ≤ t ≤ t4
ddq1(t) :=
    q1ab''(t) if 0 ≤ t ≤ t3
    ddq11bc(t) if t3 ≤ t ≤ t4
ddq2(t) :=
    q2ab''(t) if 0 ≤ t ≤ t3
    ddq21bc(t) if t3 ≤ t ≤ t4
ddq3(t) :=
    q3ab''(t) if 0 ≤ t ≤ t3
    ddq31bc(t) if t3 ≤ t ≤ t4
t := 0, 0.01 .. 2.2
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t := 0, 0.05 .. t4
q1(0) = 0
q2(0) = 0
Rm0(t) := [
    -sin(q1(t))*(l3*cos(q2(t) + q3(t)) - l2*sin(q2(t)));
    cos(q1(t))*(l3*cos(q2(t) + q3(t)) - l2*sin(q2(t)));
    l1 + l3*sin(q2(t) + q3(t)) + l2*cos(q2(t))
]
q3(0) = 0
Rm0(0) = [0; 1.1; 1.9]
Q := CreateSpace(Rm0, 0, t4, 300)
# [component: inputs Q]
# Угловые скорости звеньев
A01(t) := [cos(q1(t)), -sin(q1(t)), 0; sin(q1(t)), cos(q1(t)), 0; 0, 0, 1]
A12(t) := [0, 0, 1; cos(q2(t)), -sin(q2(t)), 0; sin(q2(t)), cos(q2(t)), 0]
A23(t) := [cos(q3(t)), -sin(q3(t)), 0; sin(q3(t)), cos(q3(t)), 0; 0, 0, 1]
Ω00(t) := [0; 0; 0]
ω11(t) := [0; 0; dq1(t)]
ω22(t) := [0; 0; dq2(t)]
ω33(t) := [0; 0; dq3(t)]
Ω01(t) := transpose(A01(t))*Ω00(t)
Ω11(t) := Ω01(t) + ω11(t)
Ω12(t) := transpose(A12(t))*Ω11(t)
Ω22(t) := Ω12(t) + ω22(t)
Ω23(t) := transpose(A23(t))*Ω22(t)
Ω33(t) := Ω23(t) + ω33(t)
# Угловые ускорения звеньев
E00(t) := [0; 0; 0]
ε11(t) := [0; 0; ddq1(t)]
ε22(t) := [0; 0; ddq2(t)]
ε33(t) := [0; 0; ddq3(t)]
E11(t) := transpose(A01(t))*E00(t) + Ω11(t)×ω11(t) + ε11(t)
E22(t) := transpose(A12(t))*E11(t) + Ω22(t)×ω22(t) + ε22(t)
E33(t) := transpose(A23(t))*E22(t) + Ω33(t)×ω33(t) + ε33(t)
# Определение скоростей точек звеньев
ro10(t) := [0; 0; 0]
ro21(t) := [0; 0; l1]
ro32(t) := [0; l2; 0]
rM3(t) := [l3; 0; 0]
l1 := 0.9
Vo00(t) := [0; 0; 0]
νo10(t) := [0; 0; 0]
νo21(t) := [0; 0; 0]
νo32(t) := [0; 0; 0]
l2 := 1
l3 := 1.1
a := 0.2
b := 0.1
Vo11(t) := transpose(A01(t))*(Vo00(t) + Ω00(t)×ro10(t) + νo10(t))
d := 0.2
Vo22(t) := transpose(A12(t))*(Vo11(t) + Ω11(t)×ro21(t) + νo21(t))
Vo33(t) := transpose(A23(t))*(Vo22(t) + Ω22(t)×ro32(t) + νo32(t))
VM3(t) := Vo33(t) + Ω33(t)×rM3(t)
RM0 simplify → [
    -sin(q1)*(l3*cos(q2 + q3) - l2*sin(q2));
    cos(q1)*(l3*cos(q2 + q3) - l2*sin(q2));
    l1 + l3*sin(q2 + q3) + l2*cos(q2);
    1
]
modVM3(t) := sqrt(VM3(t)[0]^2 + VM3(t)[1]^2 + VM3(t)[2]^2)
Rm0(t) := [
    -sin(q1(t))*(l3*cos(q2(t) + q3(t)) - l2*sin(q2(t)));
    cos(q1(t))*(l3*cos(q2(t) + q3(t)) - l2*sin(q2(t)));
    l1 + l3*sin(q2(t) + q3(t)) + l2*cos(q2(t))
]
modVM0(t) := sqrt((d/dt(Rm0(t)[0]))^2 + (d/dt(Rm0(t)[1]))^2 + (d/dt(Rm0(t)[2]))^2)
t := 0, 0.05 .. t4
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# Определение ускорений точек звеньев
Wo00(t) := [0; 0; 0]
Wo10(t) := [0; 0; 0]
Wo21(t) := [0; 0; 0]
Wo32(t) := [0; 0; 0]
Wo11(t) := transpose(A01(t))*(Wo00(t) + E00(t)×ro10(t) + Ω00(t)×(Ω00(t)×ro10(t)) + 2*Ω00(t)×νo10(t) + Wo10(t))
Wo22(t) := transpose(A12(t))*(Wo11(t) + E11(t)×ro21(t) + Ω11(t)×(Ω11(t)×ro21(t)) + 2*Ω11(t)×νo21(t) + Wo21(t))
Wo33(t) := transpose(A23(t))*(Wo22(t) + E22(t)×ro32(t) + Ω22(t)×(Ω22(t)×ro32(t)) + 2*Ω22(t)×νo32(t) + Wo32(t))
Wm3(t) := Wo33(t) + E33(t)×rM3(t) + Ω33(t)×(Ω33(t)×rM3(t))
modWM3(t) := sqrt(Wm3(t)[0]^2 + Wm3(t)[1]^2 + Wm3(t)[2]^2)
modWM0(t) := sqrt((d^2/dt^2(Rm0(t)[0]))^2 + (d^2/dt^2(Rm0(t)[1]))^2 + (d^2/dt^2(Rm0(t)[2]))^2)
t := 0, 0.01 .. t4
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# Скорости и ускорения центров масс звеньев
rc11 := [0; 0; l1/2]
Vc11(t) := Vo11(t) + Ω11(t)×rc11
Wc11(t) := Wo11(t) + E11(t)×rc11 + Ω11(t)×(Ω11(t)×rc11)
rc22 := [0; l2/2; 0]
Vc22(t) := Vo22(t) + Ω22(t)×rc22
Wc22(t) := Wo22(t) + E22(t)×rc22 + Ω22(t)×(Ω22(t)×rc22)
rc33 := [l3/2; 0; 0]
Vc33(t) := Vo33(t) + Ω33(t)×rc33
Wc33(t) := Wo33(t) + E33(t)×rc33 + Ω33(t)×(Ω33(t)×rc33)
# Динамика робота с жесткими звеньями
ρ := 7800
R_1 := 0.1*l1
R_2 := 0.05*l2
R_3 := 0.025*l3  # радиусы звеньев
m_1 := ρ*π*R_1^2*l1 = 178.637
m_2 := ρ*π*R_2^2*l2 = 61.2611  # массы звеньев
m_3 := ρ*π*R_3^2*l3 = 20.3846
J_z1 := m_1*R_1^2/2
J_x1 := m_1/12*((3*R_1)^2 + l1^2)
J_y1 := m_1/12*((3*R_1)^2 + l1^2)
Ic1 := [J_x1, 0, 0; 0, J_y1, 0; 0, 0, J_z1]
J_x2 := m_2/12*((3*R_2)^2 + l2^2)
J_z2 := m_2/12*((3*R_2)^2 + l2^2)
J_y2 := m_2*R_2^2/2
Ic2 := [J_x2, 0, 0; 0, J_y2, 0; 0, 0, J_z2]
J_x3 := m_3*R_3^2/2
J_y3 := m_3/12*((3*R_3)^2 + l3^2)
J_z3 := m_3/12*((3*R_3)^2 + l3^2)
Ic3 := [J_x3, 0, 0; 0, J_y3, 0; 0, 0, J_z3]
# силы и моменты инерции
F_11(t) := -m_1*Wc11(t)
L_C11(t) := -(Ic1*E11(t) + Ω22(t)×(Ic1*Ω11(t)))
F_22(t) := -m_2*Wc22(t)
L_C22(t) := -(Ic2*E22(t) + Ω22(t)×(Ic2*Ω22(t)))
F_33(t) := -m_3*Wc33(t)
L_C33(t) := -(Ic3*E33(t) + Ω33(t)×(Ic3*Ω33(t)))
g := 9.8
G_10 := [0; 0; -m_1*g]
G_20 := [0; 0; -m_2*g]
G_30 := [0; 0; -m_3*g]
A02(t) := A01(t)*A12(t)
A03(t) := A01(t)*A12(t)*A23(t)
G_11(t) := transpose(A01(t))*G_10
G_22(t) := transpose(A02(t))*G_20
G_33(t) := transpose(A03(t))*G_30
# 3-е звено:
# вектор из центра масс 3 звена в начало координат 3 СК. Считается в ск начала координат
t := 0, 0.05 .. t4
C3O3(t) := [-l3/2; 0; 0]
R_23(t) := -G_33(t) - F_33(t)
M_23(t) := -L_C33(t) - C3O3(t)×R_23(t)
Q_3(t) := M_23(t)[2]
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u := sqrt((a*cos(q333 + q222) - b)^2 + (l1 - d - a*sin(q333 + q222))^2)
d/dq333(u) simplify → 0.02*(sin(q222 + q333) - 7.0*cos(q222 + q333))/sqrt(0.54 - 0.28*sin(q222 + q333) - 0.04*cos(q222 + q333))
P(t) := Q_3(t)/(0.02*(sin(q2(t) + q3(t)) - 7.0*cos(q2(t) + q3(t)))/sqrt(0.54 - 0.28*sin(q2(t) + q3(t)) - 0.04*cos(q2(t) + q3(t))))
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# 2-е звено
R_32(t) := -A23(t)*R_23(t)
R_12(t) := -R_32(t) - G_22(t) - F_22(t)
C2O2(t) := [0; -l2/2; 0]
C2O3(t) := [0; l2/2; 0]
M_32(t) := -A23(t)*M_23(t)
M_12(t) := -M_32(t) - L_C22(t) - C2O3(t)×R_32(t) - C2O2(t)×R_12(t)
Q_2(t) := M_12(t)[2]
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t := 0, 0.05 .. t4
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# 1-е звено
R_21(t) := -A12(t)*R_12(t)
R_01(t) := -R_21(t) - G_11(t) - F_11(t)
C1O2 := [0; 0; l1/2]
C1O1 := [0; 0; -l1/2]
M_21(t) := -A12(t)*M_12(t)
M_01(t) := -M_21(t) - L_C11(t) - C1O2×R_21(t) - C1O1×R_01(t)
Q_1(t) := M_01(t)[2]
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H_01(t) := [cos(q1(t)), -sin(q1(t)), 0, 0; sin(q1(t)), cos(q1(t)), 0, 0; 0, 0, 1, 0; 0, 0, 0, 1]
H_12(t) := [0, 0, 1, 0; cos(q2(t)), -sin(q2(t)), 0, 0; sin(q2(t)), cos(q2(t)), 0, l1; 0, 0, 0, 1]
H_23(t) := [cos(q3(t)), -sin(q3(t)), 0, 0; sin(q3(t)), cos(q3(t)), 0, l2; 0, 0, 1, 0; 0, 0, 0, 1]
rc33 := [l3/2; 0; 0]
R_C33 := [l3/2; 0; 0; 1]
R_C30(t) := H_01(t)*H_12(t)*H_23(t)*R_C33
rc22 := [0; l2/2; 0]
R_C22 := [0; l2/2; 0; 1]
R_C20(t) := H_01(t)*H_12(t)*R_C22
rc11 := [0; 0; l1/2]
R_C11 := [0; 0; l1/2; 1]
R_C10(t) := H_01(t)*R_C11
dTdq1(t) := 0
dTddq1(t) := dq1(t)*(4*J_x2 + 4*J_x3 + 4*J_y2 + 8*J_z1 + 4*J_y3 - 4*J_x2*cos(2*q2(t)) + 4*J_y2*cos(2*q2(t)) + l2^2*m_2 + 4*l2^2*m_3 + l3^2*m_3 - 4*J_x3*cos(2*q2(t) + 2*q3(t)) + 4*J_y3*cos(2*q2(t) + 2*q3(t)) - l2^2*m_2*cos(2*q2(t)) - 4*l2^2*m_3*cos(2*q2(t)) + l3^2*m_3*cos(2*q2(t) + 2*q3(t)) + 4*l2*l3*m_3*sin(q3(t)) - 4*l2*l3*m_3*sin(2*q2(t) + q3(t)))/8
dTdq2(t) := dq1(t)^2*(4*J_x2*sin(2*q2(t)) - 4*J_y2*sin(2*q2(t)) + 4*J_x3*sin(2*q2(t) + 2*q3(t)) - 4*J_y3*sin(2*q2(t) + 2*q3(t)) + l2^2*m_2*sin(2*q2(t)) + 4*l2^2*m_3*sin(2*q2(t)) - l3^2*m_3*sin(2*q2(t) + 2*q3(t)) - 4*l2*l3*m_3*cos(2*q2(t) + q3(t)))/8
dTddq2(t) := J_z2*dq2(t) + J_z3*dq2(t) + J_z3*dq3(t) + dq2(t)*l2^2*m_2/4 + dq2(t)*l2^2*m_3 + dq2(t)*l3^2*m_3/4 + dq3(t)*l3^2*m_3/4 + dq2(t)*l2*l3*m_3*sin(q3(t)) + dq3(t)*l2*l3*m_3*sin(q3(t))/2
dTdq3(t) := J_x3*dq1(t)^2*sin(2*q2(t) + 2*q3(t))/2 - J_y3*dq1(t)^2*sin(2*q2(t) + 2*q3(t))/2 - dq1(t)^2*l3^2*m_3*sin(2*q2(t) + 2*q3(t))/8 + dq1(t)^2*l2*l3*m_3*cos(q3(t))/4 + dq2(t)^2*l2*l3*m_3*cos(q3(t))/2 - dq1(t)^2*l2*l3*m_3*cos(2*q2(t) + q3(t))/4 + dq2(t)*dq3(t)*l2*l3*m_3*cos(q3(t))/2
dTddq3(t) := J_z3*dq2(t) + J_z3*dq3(t) + dq2(t)*l3^2*m_3/4 + dq3(t)*l3^2*m_3/4 + dq2(t)*l2*l3*m_3*sin(q3(t))/2
Q_C3(t) := -m_3*g*(d/d(q3(t))(R_C30(t)[2]))  # error: Здесь требуется имя.
Q_C2(t) := -m_3*g*(d/d(q2(t))(R_C30(t)[2])) - m_2*g*(d/d(q2(t))(R_C20(t)[2]))  # error: Здесь требуется имя.
Q_C1(t) := -m_3*g*(d/d(q1(t))(R_C30(t)[2])) - m_2*g*(d/d(q1(t))(R_C20(t)[2])) - m_1*g*(d/d(q1(t))(R_C10(t)[2]))  # error: Здесь требуется имя.
Q_C3(t) := -g*l3*m_3*cos(q2(t) + q3(t))/2
Q_C2(t) := g*l2*m_2*sin(q2(t))/2 - g*m_3*(-l2*sin(q2(t)) + l3*cos(q2(t) + q3(t))/2)
Q_C1(t) := 0
# уравнения Лагранжа 2-го рода
T_1 := 1/2*m_1*transpose(Vc11)*Vc11 + 1/2*transpose(Ω11)*(Ic1*Ω11)  # error: Это значение должно быть скаляром.
T_2 := 1/2*m_2*transpose(Vc22)*Vc22 + 1/2*transpose(Ω22)*(Ic2*Ω22)  # error: Это значение должно быть скаляром.
T_3 := 1/2*m_3*transpose(Vc33)*Vc33 + 1/2*transpose(Ω33)*(Ic3*Ω33)  # error: Это значение должно быть скаляром.
T := T_1 + T_2 + T_3
Q_3L(t) := d/dt(dTddq3(t)) - dTdq3(t) - Q_C3(t)
Q_2L(t) := d/dt(dTddq2(t)) - dTdq2(t) - Q_C2(t)
Q_1L(t) := d/dt(dTddq1(t)) - dTdq1(t) - Q_C1(t)
t := 0, 0.05 .. t4
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t := 0, 0.05 .. t4
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t := 0, 0.05 .. t4
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# Геометрические и кинематические ошибки
# 1-е звено | 2-е звено | 3-е звено
D_ξ1x1 := 0
D_ξ2x2 := (10^-5*l1)^2
D_ξ3x3(t) := (10^-5*l2)^2
D_ξ1y1 := 0  # для 7 квалитета и длины 900мм
# для 7 квалитета и длины 1000мм
D_ξ1z1 := 0
D_ξ2y2(t) := (10^-6*90/6)^2
D_ξ3y3(t) := (10^-6*105/6)^2
D_θ1x1 := (1.8*10^-4)^2
D_ξ2z2(t) := (10^-5*l1)^2
D_ξ3z3(t) := (10^-5*l2)^2
D_θ1y1 := (1.8*10^-4)^2
D_θ3x3 := (1.8*10^-4)^2
D_θ2x2 := (1.8*10^-4)^2
D_θ1z1 := (2.7*10^-4)^2
D_θ3y3 := (1.8*10^-4)^2
D_θ2y2 := (1.8*10^-4)^2
D_θ3z3 := (2.7*10^-4)^2
D_θ2z2 := (2.7*10^-4)^2
H12(t) := [0, 0, 1, 0; cos(q2(t)), -sin(q2(t)), 0, 0; sin(q2(t)), cos(q2(t)), 0, l1; 0, 0, 0, 1]
H23(t) := [cos(q3(t)), -sin(q3(t)), 0, 0; sin(q3(t)), cos(q3(t)), 0, l2; 0, 0, 1, 0; 0, 0, 0, 1]
RM3 := [l3; 0; 0; 1]
RM2(t) := H23(t)*RM3
RM1(t) := H12(t)*RM2(t)
D_1(t) := D_ξ1x1 + D_ξ1y1 + D_ξ1z1 + D_θ1x1*(RM1(t)[1]^2 + RM1(t)[2]^2) + D_θ1y1*(RM1(t)[0]^2 + RM1(t)[2]^2) + D_θ1z1*(RM1(t)[0]^2 + RM1(t)[1]^2)
D_2(t) := D_ξ2x2 + D_ξ2y2(t) + D_ξ2z2(t) + D_θ2x2*(RM2(t)[1]^2 + RM2(t)[2]^2) + D_θ2y2*(RM2(t)[0]^2 + RM2(t)[2]^2) + D_θ2z2*(RM2(t)[0]^2 + RM2(t)[1]^2)
D_3(t) := D_ξ3x3(t) + D_ξ3y3(t) + D_ξ3z3(t) + D_θ3x3*(RM3[1]^2 + RM3[2]^2) + D_θ3y3*(RM3[0]^2 + RM3[2]^2) + D_θ3z3*(RM3[0]^2 + RM3[1]^2)
DRM0(t) := D_1(t) + D_2(t) + D_3(t)
σRM(t) := sqrt(DRM0(t))
t := 0, 0.05 .. t4
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