# 24. IV. б) Расчет вала | Двигатель 2ПН160М:
ndn := 1500
ω_d := ndn*2*π/60
ω_I := ω_d = 157.08
ω_III := 15
M_пmax := 894.937
l1 := 0.45
l2 := 0.19
l3 := 0.3
γ1 := 15
γ2 := 60
z1 := 20
z2' := 26
E_пр := 2*10^11
σ_ив := 4*10^7
σ_k3 := 10^9
σ_смIII := 1.8*10^8
σ_из := 2*10^8
α := 20*deg
τ_срIII := 1.2*10^8
ψ := 0.3
η_3 := 0.97
η_II := 0.99
# 1. Определение мощности на валах редуктора
N_III := M_пmax*ω_III
N_II := N_III/(η_3*η_II)
N_I := N_II/(η_3*η_II)
# 2. Кинематический расчет передаточного механизма(редуктора)
# a) Передаточное число редуктора
u_I_III := |ω_I/ω_III| = 10.472
# в) Разбить общее передаточное число на  частные передаточные числа отдельных передач
u_1_2 := sqrt(u_I_III) = 3.23604
u_2'_3 := sqrt(u_I_III)
# г) Определить недостающие числа зубьев и округлить их до ближайщих целых чисел
z2 := z1*u_1_2
z2 = 64.7209
z3 := z2'*u_2'_3
z3 = 84.1371
z2 := 65
z3 := 84
# д) Определить уточненные передаточные числа
u12y := z2/z1 = 3.25
u2'3y := z3/z2' = 3.23077
# д) Определить уточненные угловые скорости
ω_I := ω_d
ω_IIy := ω_I/u12y
ω_IIIy := ω_I/(u12y*u2'3y)
ω_IIIy = 14.96
# ж) Оценить ошибку по ωIII
Δω_III := (ω_IIIy - ω_III)/ω_III
Δω_III*100 = -0.2669
# 3. Определение геометрических размеров редуктора
# а) Определить межосевые расстояния из условия прочности зубьев
a12р := u12y^3*sqrt((0.418/(u12y*σ_k3))^2*2*N_II*E_пр/(ω_IIy*ψ*sin(2*α)))
a2'3р := u2'3y^3*sqrt((0.418/(u2'3y*σ_k3))^2*2*N_III*E_пр/(ω_IIIy*ψ*sin(2*α)))
# б) Найти расчетные модули зубьев
m1р := 2*a12р/(z1 + z2)
m2р := 2*a2'3р/(z2' + z3)
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m1р = 0.00254454
m2р = 0.00342245
m1 := 2.5*10^-3
m2 := 3.5*10^-3
# г) Уточнить межосевые расстояния
a12 := m1*(z1 + z2)/2 = 0.10625
a2'3 := m2*(z2' + z3)/2 = 0.1925
# д) Определить толщину зубчатых венцов
b1 := ψ*a12 = 0.031875
b2 := ψ*a2'3 = 0.05775
# e) Определить радиусы делительных окружностей
r1 := m1*z1/2 = 0.025
r2 := m1*z2/2 = 0.08125
r2' := m2*z2'/2 = 0.0455
r3 := m2*z3/2 = 0.147
# 4. Расчет усилий, действующих на зубья колес промежуточного редуктора
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# б) Определить окружные силы, действующие на промежуточный вал
Fτ12 := N_II/(r2*ω_IIy)
Fτ32' := N_II/(r2'*ω_IIy)
# б) Определить радиальные силы, действующие на промежуточный вал
Fr12 := Fτ12*tan(α)
Fr32' := Fτ32'*tan(α)
# в) Определить нормальные силы, действующие на промежуточный вал
Fn12 := sqrt(Fτ12^2 + Fr12^2)
Fn32' := sqrt(Fτ32'^2 + Fr32'^2)
# 5. Проверка зубьев на изгибную прочность по формулам
σи1 := Fn12*4.12/(b1*m1) = 195856553
σи2 := Fn12*3.73/(b1*m1) = 177316733
σи2' := Fn32'*3.96/(b2*m2) = 132531227
σи3 := Fn32'*3.73/(b2*m2) = 124833706
# 6. Определение внешних усилий, действующих на промежуточный вал
# а) Вычислить проекции сил, действующих на зубья колес, на оси xO2y
Fτ12x := Fτ12*cos(345 deg)
Fτ12y := Fτ12*sin(345 deg)
Fτ32'x := Fτ32'*cos(300 deg)
Fτ32'y := Fτ32'*sin(300 deg)
Fr12x := Fr12*cos(255 deg)
Fr12y := Fr12*sin(255 deg)
Fr32'x := Fr32'*cos(30 deg)
Fr32'y := Fr32'*sin(30 deg)
Fn12x := Fn12*cos(325 deg)
Fn12y := Fn12*sin(325 deg)
Fn32'x := Fn32'*cos(320 deg)
Fn32'y := Fn32'*sin(320 deg)
# Проверка:
F12x := Fτ12x + Fr12x = 3103.1
Fn12x = 3103.1
F12y := Fτ12y + Fr12y = -2172.81
Fn12y = -2172.81
F32'x := Fτ32'x + Fr32'x = 5182
Fn32'x = 5182
F32'y := Fτ32'y + Fr32'y = -4348.21
Fn32'y = -4348.21
# б) Определить крутящий момент, который возникает при приведении полученных выше сил к оси вала
Mкр := Fτ12*r2 = 289.228
Mкр := Fτ32'*r2' = 289.228
# в) В горизонатальной и вертикальной плоскостях определить из уравнений статики определить опорные реакции в O2
RAx := (-F12x*(l1 + l2 + l3) - F32'x*l3)/(l1 + l3)
RAy := (-F12y*(l1 + l2 + l3) - F32'y*l3)/(l1 + l3)
RBx := -(F12x + F32'x + RAx)
RBy := -(F12y + F32'y + RAy)
# 7. Определение внутренних усилий и построение эпюр
Φ(x) :=
    1 if x ≥ 0
    0 otherwise
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# а) По соответствующим зависимостям в горизонтальной и вертикальной плоскости  построить эпюры поперечных сил и изгибающих моментов
z := 0, 0.01 .. (l2 + l1 + l3)
Mx(z) := F12x*z*Φ(z) + RAx*(z - l2)*Φ(z - l2) + F32'x*(z - (l2 + l1))*Φ(z - (l2 + l1))
My(z) := F12y*z*Φ(z) + RAy*(z - l2)*Φ(z - l2) + F32'y*(z - (l2 + l1))*Φ(z - (l2 + l1))
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# б) Определить суммарный изгибающий момент путем геометрического сложения горизонтальной и вертикальной составляющих момента
Mи(z) := sqrt(Mx(z)^2 + My(z)^2)
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# в) Построить эпюру крутящего момента
Mкр(z) := Mкр*Φ(z) - Mкр*Φ(z - (l2 + l1))
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# г) Для каждого сечения определить эквивалентный момент путем геометрического сложения соответствующих изгибающего и крутящего моментов и построить эпюру Mэкв
Mэкв(z) := sqrt(Mкр(z)^2 + Mи(z)^2)
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# 8. Подбор сечения промежуточного вала по условию прочности, соответствующему состоянию предельной упругости:
# а) Определить диаметр вала
d(z) := nthroot(32*Mэкв(z)/(π*σ_ив), 3)
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# б) Построить теоретический профиль вала
# в) Определить диаметр опасного сечения вала
z1 := 0.6
zmax := Maximize(d, z1) = 0.639999
dоп := d(zmax) = 0.0628523
dст := 0.1
# Проверены: 63, 70, 80, 90 для них не выполнялись условия жесткости
# 9. Определение упругих деформаций промежуточного вала
# а) Определить осевые моменты инерции поперечных сечений вала
Jx := π*dст^4/64
Jy := π*dст^4/64
# б) В горизонтальной и вертикальной плоскостях построить эпюры углов поворота поперечных сечений и прогибов вала и проверить выполнение условий жесткости
θx(z) := (F12x*z^2 + RAx*Φ(z - l2)*(z - l2)^2 + F32'x*Φ(z - l1 - l2)*(z - l1 - l2)^2 + Cx)/(2*E_пр*Jx)  # error: Эта переменная неопределена.
θy(z) := (F12y*z^2 + RAy*Φ(z - l2)*(z - l2)^2 + F32'y*Φ(z - l1 - l2)*(z - l1 - l2)^2 + Cy)/(2*E_пр*Jy)  # error: Эта переменная неопределена.
wx(z) := (F12x*z^3 + RAx*Φ(z - l2)*(z - l2)^3 + F32'x*Φ(z - l1 - l2)*(z - l1 - l2)^3 + Dx + Cx*z)/(6*E_пр*Jx)  # error: Эта переменная неопределена.
wy(z) := (F12y*z^3 + RAy*Φ(z - l2)*(z - l2)^3 + F32'y*Φ(z - l1 - l2)*(z - l1 - l2)^3 + Dy + Cy*z)/(6*E_пр*Jy)  # error: Эта переменная неопределена.
wx(l2) simplify → 3.22554018e-8*Cx + 1.69765272631e-7*Dx + 3.61331038583e-6
wx(l2 + l1 + l3) simplify → 1.59579356273e-7*Cx + 1.69765272631e-7*Dx + 3.43049572788e-5
Cx := 1
Dx := 1
Given
3.22554018e-8*Cx + 1.69765272631e-7*Dx + 3.61331038583e-6 == 0
1.59579356273e-7*Cx + 1.69765272631e-7*Dx + 3.43049572788e-5 == 0
[Cx; Dx] := Find(Cx, Dx)
Cx = -241.052
Dx = 24.5157
wy(l2) simplify → 3.22554018e-8*Cy + 1.69765272631e-7*Dy - 2.53006717005e-6
wy(l2 + l1 + l3) simplify → 1.59579356273e-7*Cy + 1.69765272631e-7*Dy - 6.70064596173e-6
Cy := 1
Dy := 1
Given
3.22554018e-8*Cy + 1.69765272631e-7*Dy - 2.53006717005e-6 == 0
1.59579356273e-7*Cy + 1.69765272631e-7*Dy - 6.70064596173e-6 == 0
[Cy; Dy] := Find(Cy, Dy)
Cy = 32.7556
Dy = 8.67975
θx(z) := (F12x*z^2 + RAx*Φ(z - l2)*(z - l2)^2 + F32'x*Φ(z - l1 - l2)*(z - l1 - l2)^2 + Cx)/(2*E_пр*Jx)
θy(z) := (F12y*z^2 + RAy*Φ(z - l2)*(z - l2)^2 + F32'y*Φ(z - l1 - l2)*(z - l1 - l2)^2 + Cy)/(2*E_пр*Jy)
wx(z) := (F12x*z^3 + RAx*Φ(z - l2)*(z - l2)^3 + F32'x*Φ(z - l1 - l2)*(z - l1 - l2)^3 + Dx + Cx*z)/(6*E_пр*Jx)
wy(z) := (F12y*z^3 + RAy*Φ(z - l2)*(z - l2)^3 + F32'y*Φ(z - l1 - l2)*(z - l1 - l2)^3 + Dy + Cy*z)/(6*E_пр*Jy)
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zmax := 0.8
zmax := Minimize(θx, zmax)
θxmax := θx(zmax) = -0.000196796
zmax := 0.8
zmax := Maximize(θy, zmax)
θпров := 0.005
θymax := θy(zmax) = 0.000118004
0.01*m1 = 2.5e-5
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0.01*m2 = 3.5e-5
zmax := 0.6
zmax := Maximize(wx, zmax)  # Условия жесткости выполняются
wxmax := wx(zmax) = 2.38886e-5
zmax := 0.6
zmax := Minimize(wy, zmax)
wymax := wy(zmax) = -2.27573e-5
# 10. Выбор подшипников качения
# а) Определить радиальные нагрузки в опорах
RA := sqrt(RAx^2 + RAy^2) = 7447.14
RB := sqrt(RBx^2 + RBy^2) = 3103.87
# б) Определить приведенную нагрузку для наиболее нагруженного радиального подшипника
X := 1  # -коэффициент радиальной нагрузки
V := 1.0  # -безразмерный коэффициент вращения
Kб := 1.0  # -безразмерный коэффициент безопасности
Kт := 1.0  # -безразмерный температурный коэффициент
P := X*V*RA*Kб*Kт = 7447.14
# в) Определить долговечность подшипника
Lh := 10000
L := 6*10^-5*Lh*30*ω_IIy/π = 276.923
# д) Найти расчетную динамическую грузоподъемность подшипника
Cp := P*nthroot(L, 3) = 48541.1
# Сверхлегкая серия диаметров 1, нормальная серия ширин 0, 120:
# d=100 мм, D=150 мм, C=60500 Н, m=1.29 кг
# 11. Расчет шпонок
# а) Определить длину шпонки по условию прочности, соответствующему состоянию смятия
Mкр := Fτ12*r2 = 289.228
λ1 := sqrt(16*Mкр/(dст*σ_смIII)) = 0.0160341
h := λ1/4 = 0.00400852
# б) Определить длину шпонки по условию прочности, соответствующему состоянию среза
λ2 := sqrt(8*Mкр/(dст*τ_срIII)) = 0.0138859
b := λ2/4 = 0.00347148
λшп := 0.016
